*Heading
** Job name: 03_12_compress Model name: Model-1
** Generated by: Abaqus/CAE 6.12-1
*Preprint, echo=NO, model=NO, history=NO, contact=NO
**
** PARTS
**
*Part, name=Part-1
*Node
      1,          80.,        61.25
      2,         100.,        61.25
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*Element, type=SAX1
 1,  1, 29
 2, 29, 30
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*Nset, nset=Set-1
   1,   2,   3,   4,   5,   6
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*Elset, elset=Set-1
  11,  12,  13,  14,  15,  16
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*Nset, nset=Set-3
   1,   2,   3,   4,   5,   6
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*Elset, elset=Set-3
  11,  12,  13,  14,  15,  16
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*Nset, nset=Set-4
   2,   3,   4,   5,  11,  23
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*Elset, elset=Set-4
  11,  12,  13,  14,  15,  16
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*Nset, nset=Set-5
   2,   3,   4,   5,  11,  23
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*Elset, elset=Set-5
  11,  12,  13,  14,  15,  16
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*Nset, nset=Set-6
   1,   4,   5,   6,   7,   8
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*Elset, elset=Set-6
  73,  74,  75,  76,  77,  78
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*Nset, nset=Set-7
   2,   3,  11,  23,  38,  39
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*Elset, elset=Set-7
  11,  12,  13,  14,  15,  16
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*Nset, nset=Set-22
    2,    6,    9,   11,   15,   22
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*Elset, elset=Set-43
 420, 421, 422, 423, 424, 425
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** Region: (Outer:Set-39)
*Elset, elset=_I1, internal
   1,   2,   3,   4,   5,   6
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** Section: Outer
*Shell Section, elset=_I1, material=Outer
1., 5
** Region: (Inner:Set-42)
*Elset, elset=_I2, internal
   73,   74,   75,   76,   77,   78
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** Section: Inner
*Shell Section, elset=_I2, material=inner
1., 5
** Section: Section-4
*Shell Section, elset=Set-43, material=Material-3
10., 5
*End Part
**
**
** ASSEMBLY
**
*Assembly, name=Assembly
**
*Instance, name=Part-1-1, part=Part-1
*End Instance
**
*Node
      1,           0.,         500.,           0.
*Nset, nset=Set-1, instance=Part-1-1
   1,   6,   7,   8,  11,  23
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*Elset, elset=Set-1, instance=Part-1-1
  99, 100, 101, 102, 103, 104
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*Nset, nset=Set-2, instance=Part-1-1
 20, 26
*Nset, nset=Set-3, instance=Part-1-1
  20,  21, 429, 430, 431, 432, 433, 434, 435, 436, 437
*Elset, elset=Set-3, instance=Part-1-1, generate
 420,  429,    1
*Nset, nset=Set-4, instance=Part-1-1
  11,  23, 733, 734, 735, 736, 737, 738, 739, 740, 741
*Elset, elset=Set-4, instance=Part-1-1, generate
 732,  741,    1
*Nset, nset=Set-5, instance=Part-1-1
  20,  21, 429, 430, 431, 432, 433, 434, 435, 436, 437
*Elset, elset=Set-5, instance=Part-1-1, generate
 420,  429,    1
*Nset, nset=Set-6, instance=Part-1-1
  11,  23, 733, 734, 735, 736, 737, 738, 739, 740, 741
*Elset, elset=Set-6, instance=Part-1-1, generate
 732,  741,    1
*Nset, nset=Set-7, instance=Part-1-1
   20,   21,   27,   28,  429,  430
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*Elset, elset=Set-7, instance=Part-1-1
  420,  421,  422,  423,  424,  425
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*Nset, nset=Set-9, instance=Part-1-1
 20,
*Nset, nset=OneREf, instance=Part-1-1
 20,
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*Nset, nset=Set-22, instance=Part-1-1
   11,   23,   27,   28,  733,  734
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*Elset, elset=Set-22, instance=Part-1-1
  732,  733,  734,  735,  736,  737
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*Nset, nset=Ref, instance=Part-1-1
  20,  21, 429, 430, 431, 432, 433, 434, 435, 436, 437
*Elset, elset=Ref, instance=Part-1-1, generate
 420,  429,    1
*Nset, nset=Set-24, instance=Part-1-1
  20,  21,  25,  26, 429, 430
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*Elset, elset=_Surf-1_SNEG, internal, instance=Part-1-1
 123, 124, 125, 126, 127, 128
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*Surface, type=ELEMENT, name=Surf-1
_Surf-1_SNEG, SNEG
*Elset, elset=_Surf-2_SPOS, internal, instance=Part-1-1, generate
 293,  340,    1
*Elset, elset=_Surf-2_SNEG, internal, instance=Part-1-1
  73,  74,  75,  76,  77,  78
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*Surface, type=ELEMENT, name=Surf-2
_Surf-2_SPOS, SPOS
_Surf-2_SNEG, SNEG
*Elset, elset=_Surf-3_SPOS, internal, instance=Part-1-1, generate
 73,  83,   1
*Elset, elset=_Surf-3_SNEG, internal, instance=Part-1-1
  11,  12,  13,  14,  15,  16
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*Surface, type=ELEMENT, name=Surf-3
_Surf-3_SPOS, SPOS
_Surf-3_SNEG, SNEG
*Elset, elset=_Surf-4_SPOS, internal, instance=Part-1-1, generate
 420,  429,    1
*Surface, type=ELEMENT, name=Surf-4
_Surf-4_SPOS, SPOS
*Elset, elset=_Surf-5_SPOS, internal, instance=Part-1-1, generate
 420,  429,    1
*Surface, type=ELEMENT, name=Surf-5
_Surf-5_SPOS, SPOS
*Elset, elset=_Surf-6_SPOS, internal, instance=Part-1-1, generate
 420,  429,    1
*Surface, type=ELEMENT, name=Surf-6
_Surf-6_SPOS, SPOS
*Elset, elset=_Surf-7_SPOS, internal, instance=Part-1-1
  73,  74,  75,  76,  77,  78
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*Elset, elset=_Surf-7_SNEG, internal, instance=Part-1-1
   11,   12,   13,   14,   15,   16
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*Surface, type=ELEMENT, name=Surf-7
_Surf-7_SPOS, SPOS
_Surf-7_SNEG, SNEG
*Elset, elset=_Surf-8_SNEG, internal, instance=Part-1-1
  73,  74,  75,  76,  77,  78
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*Surface, type=ELEMENT, name=Surf-8
_Surf-8_SNEG, SNEG
*Elset, elset=_Surf-9_SNEG, internal, instance=Part-1-1
   73,   74,   75,   76,   77,   78
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*Surface, type=ELEMENT, name=Surf-9
_Surf-9_SNEG, SNEG
*Elset, elset=_Surf-10_SPOS, internal, instance=Part-1-1
   73,   74,   75,   76,   77,   78
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*Elset, elset=_Surf-10_SNEG, internal, instance=Part-1-1
  11,  12,  13,  14,  15,  16
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*Surface, type=ELEMENT, name=Surf-10
_Surf-10_SPOS, SPOS
_Surf-10_SNEG, SNEG
*Elset, elset=_Surf-11_SPOS, internal, instance=Part-1-1
  420,  421,  422,  423,  424,  425
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*Surface, type=ELEMENT, name=Surf-11
_Surf-11_SPOS, SPOS
*Elset, elset=_s_Surf-12_SNEG, internal, instance=Part-1-1
  420,  421,  422,  423,  424,  425
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*Surface, type=ELEMENT, name=s_Surf-12
_s_Surf-12_SNEG, SNEG
*Elset, elset=_Surf-13_SNEG, internal, instance=Part-1-1
   73,   74,   75,   76,   77,   78
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*Surface, type=ELEMENT, name=Surf-13
_Surf-13_SNEG, SNEG
*Elset, elset=_Surf-14_SPOS, internal, instance=Part-1-1
   73,   74,   75,   76,   77,   78
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*Elset, elset=_Surf-14_SNEG, internal, instance=Part-1-1
   11,   12,   13,   14,   15,   16
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*Surface, type=ELEMENT, name=Surf-14
_Surf-14_SPOS, SPOS
_Surf-14_SNEG, SNEG
*Elset, elset=_Surf-15_SPOS, internal, instance=Part-1-1, generate
 420,  429,    1
*Surface, type=ELEMENT, name=Surf-15
_Surf-15_SPOS, SPOS
*Elset, elset=_Surf-17_SNEG, internal, instance=Part-1-1
  73,  74,  75,  76,  77,  78
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*Surface, type=ELEMENT, name=Surf-17
_Surf-17_SNEG, SNEG
*Elset, elset=_Surf-18_SPOS, internal, instance=Part-1-1
  73,  74,  75,  76,  77,  78
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*Elset, elset=_Surf-18_SNEG, internal, instance=Part-1-1
  11,  12,  13,  14,  15,  16
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*Surface, type=ELEMENT, name=Surf-18
_Surf-18_SPOS, SPOS
_Surf-18_SNEG, SNEG
*Elset, elset=_Surf-19_SPOS, internal, instance=Part-1-1, generate
 420,  478,    1
*Surface, type=ELEMENT, name=Surf-19
_Surf-19_SPOS, SPOS
*Elset, elset=_Surf-20_SPOS, internal, instance=Part-1-1, generate
 955,  969,    1
*Surface, type=ELEMENT, name=Surf-20
_Surf-20_SPOS, SPOS
*Elset, elset=_Surf-21_SPOS, internal, instance=Part-1-1, generate
 420,  478,    1
*Surface, type=ELEMENT, name=Surf-21
_Surf-21_SPOS, SPOS
*Elset, elset=_Surf-22_SPOS, internal, instance=Part-1-1
  73,  74,  75,  76,  77,  78
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*Elset, elset=_Surf-22_SNEG, internal, instance=Part-1-1
  11,  12,  13,  14,  15,  16
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*Surface, type=ELEMENT, name=Surf-22
_Surf-22_SPOS, SPOS
_Surf-22_SNEG, SNEG
*Elset, elset=_Surf-23_SNEG, internal, instance=Part-1-1
   73,   74,   75,   76,   77,   78
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*Surface, type=ELEMENT, name=Surf-23
_Surf-23_SNEG, SNEG
*End Assembly
**
** MATERIALS
**
*Material, name=Material-3
*Elastic
200., 0.49
*Material, name=Outer
*Elastic, type=ENGINEERING CONSTANTS
20., 20., 20.,  0.,  0.,  0., 0.5, 0.5
 0.5,
*Material, name=inner
*Elastic, type=ENGINEERING CONSTANTS
1., 20., 20.,  0.,  0.,  0., 0.5, 0.5
 0.5,
** ----------------------------------------------------------------
**
** STEP: Step-1
**
*Step, name=Step-1
*Static
1., 1., 1e-05, 1.
**
** BOUNDARY CONDITIONS
**
** Name: BC-1 Type: Displacement/Rotation
*Boundary
Set-22, 2, 2
** Name: BC-2 Type: Displacement/Rotation
*Boundary
Set-24, 2, 2, 1050.
**
** LOADS
**
** Name: Load-1-Copy   Type: Pressure
*Dsload
Surf-22, P, 0.5
** Name: Load-1-Copy-Copy   Type: Pressure
*Dsload
Surf-23, P, 2.
**
** OUTPUT REQUESTS
**
*Restart, write, frequency=0
**
** FIELD OUTPUT: F-Output-2
**
*Output, field
*Node Output, nset=Ref
U,
**
** FIELD OUTPUT: F-Output-3
**
*Element Output, elset=Part-1-1."inner stress", directions=YES
S,
**
** FIELD OUTPUT: F-Output-4
**
*Element Output, elset=Part-1-1."outer stress", directions=YES
S,
**
** FIELD OUTPUT: F-Output-1
**
*Output, field, variable=PRESELECT
**
** HISTORY OUTPUT: H-Output-2
**
*Output, history
*Node Output, nset=OneREf
U1, U2, U3, UR1, UR2, UR3
**
** HISTORY OUTPUT: H-Output-1
**
*Output, history, variable=PRESELECT
*End Step
